// SBML level 2 version 4

model MODEL1403050003()
  // Kallenberger2014 - CD95L induced apoptosis initiated by caspase-8, wild-type HeLa cells (cis/trans-cis/trans variant)
  // The paper describes a new approach that combines single cell and population data in the same model. The model consists of a large number of single cell models, which are fitted to single cell data. Simultaneously, ensemble averages are fitted to population data. It is assumed that the kinetics in each cell can be described with the same kinetic parameters. Therefore, cell-to-cell variability is explained by variable initial protein concentrations.
  // There are four variants of the model (with [CD95L]=500ng/ml = 16.6nM), i) cistrans (in CD95-HeLa cells) [ MODEL1403050000 ], ii) cistrans (in wild-type HeLa cells) [ MODEL1403050001 ], iii) cistrans-cistrans (in CD95-HeLa cells) [ MODEL1403050002 ], and iv) cistrans-cistrans (in wild-type HeLa cells) [ MODEL1403050003 ].
  // These model contain the equations for one "average cell" with median initial concentrations for CD95, FADD, p55, BID, PrNES_mCherry and PrER_mGFP. By integrating the model, it should be possible to obtain trajectories for PrER_mGFP, PrNES_mCherry, p43 and p18 similar as in Figure 4A (CD95-HeLa cells) and Figure 4B (wild-type HeLa cells).
  // This model is described in the article:
  // Intra- and Interdimeric Caspase-8 Self-Cleavage Controls Strength and Timing of CD95-Induced Apoptosis
  // Stefan M. Kallenberger, Joël Beaudouin, Juliane Claus, Carmen Fischer, Peter K. Sorger, Stefan Legewie, and Roland Eils
  // 11 March 2014: Vol. 7, Issue 316, p. ra23
  // Abstract:
  // Apoptosis in response to the ligand CD95L (also known as Fas ligand) is initiated by caspase-8, which is activated by dimerization and self-cleavage at death-inducing signaling complexes (DISCs). Previous work indicated that the degree of substrate cleavage by caspase-8 determines whether a cell dies or survives in response to a death stimulus. To determine how a death ligand stimulus is effectively translated into caspase-8 activity, we assessed this activity over time in single cells with compartmentalized probes that are cleaved by caspase-8 and used multiscale modeling to simultaneously describe single-cell and population data with an ensemble of single-cell models. We derived and experimentally validated a minimal model in which cleavage of caspase-8 in the enzymatic domain occurs in an interdimeric manner through interaction between DISCs, whereas prodomain cleavage sites are cleaved in an intradimeric manner within DISCs. Modeling indicated that sustained membrane-bound caspase-8 activity is followed by transient cytosolic activity, which can be interpreted as a molecular timer mechanism reflected by a limited lifetime of active caspase-8. The activation of caspase-8 by combined intra- and interdimeric cleavage ensures weak signaling at low concentrations of CD95L and strongly accelerated activation at higher ligand concentrations, thereby contributing to precise control of apoptosis.
  // This model is hosted on BioModels Database and identified by: BIOMD0000000526 .
  // To cite BioModels Database, please use: BioModels Database: An enhanced, curated and annotated resource for published quantitative kinetic models .
  // To the extent possible under law, all copyright and related or neighbouring rights to this encoded model have been dedicated to the public domain worldwide. Please refer to CC0 Public Domain Dedication for more information.
  // biomodels.db:MODEL1403050003
  // biomodels.db:BIOMD0000000526
  // isDescribedBy pubmed:24619646
  // hasProperty mamo:MAMO_0000046
  // isVersionOf GO:0008219 GO:0006915
  // hasTaxon taxonomy:9606

  // Compartments:
  compartment cell = 1;  // isVersionOf GO:0005623

  // Species:
  species CD95 in cell = 12;  // isVersionOf uniprot:P25445
  species FADD in cell = 90;  // isVersionOf uniprot:Q13158
  species p55free in cell = 127;  // isEncodedBy ensembl:ENSG00000064012
  species Bid in cell = 224;  // isVersionOf uniprot:P55957
  species PrNES_mCherry in cell = 1909;  // hasPart CHEBI:50406 uniprot:Q9U6Y8 SO:0001531
  species PrER_mGFP in cell = 3316;  // hasPart CHEBI:50406 uniprot:P27824 uniprot:P42212
  species DISC in cell = 0;  // isVersionOf GO:0031264
  species DISCp55 in cell = 0;  // hasPart ensembl:ENSG00000064012 GO:0031264
  species p30 in cell = 0;  // isEncodedBy ensembl:ENSG00000064012
  species p43 in cell = 0;  // isPartOf uniprot:O15519
  species p18 in cell = 0;  // isPartOf uniprot:Q14790
  species p18inactive in cell = 0;  // hasProperty PATO:0002355; isVersionOf uniprot:Q14790
  species tBid in cell = 0;  // hasPart uniprot:P55957 GO:0097345
  species PrNES in cell = 0;  // hasPart CHEBI:50406 SO:0001531
  species mCherry in cell = 0;  // isVersionOf uniprot:Q9U6Y8
  species PrER in cell = 0;  // hasPart CHEBI:50406 uniprot:P27824
  species mGFP in cell = 0;  // isVersionOf uniprot:P42212
  species CD95L in cell = 16.6;  // isVersionOf uniprot:P48023

  // Parameters:
  kon_FADD = 0.001088719;
  koff_FADD = 0.00130855;
  kDISC = 0.0003649659;
  kD216 = 0.006397759;
  kD216trans_p55 = 0.0002232464;
  kD216trans_p43 = 5.29907e-5;
  kD374 = 0.0006446126;
  kD374trans_p55 = 0.0005435186;
  kD374trans_p43 = 0.004135301;
  kdiss_p18 = 0.06471365;
  kBid = 0.0005213406;
  kD374probe = 0.0015371;
  KDR = 57.205;
  KDL = 30.00604;

  // Assignment rules:
  CD95act := CD95^3*KDL^2*CD95L/((CD95L + KDL)*(CD95^2*KDL^2 + KDR*CD95L^2 + 2*KDR*KDL*CD95L + KDR*KDL^2));

  // Reactions:
  reaction_1: FADD => DISC; kon_FADD*CD95act*FADD*cell;
  reaction_2: DISC => FADD; koff_FADD*DISC*cell;
  reaction_3: p55free + DISC => DISCp55; kDISC*p55free*DISC*cell;
  reaction_4: DISCp55 => p30; kD216*DISCp55*cell;
  reaction_5: DISCp55 => p30; kD216trans_p55*DISCp55*(DISCp55 + p30)*cell;
  reaction_6: DISCp55 => p30; kD216trans_p43*DISCp55*p43*cell;  // modifiers: p43
  reaction_7: p43 => p18 + DISC; kD216*p43*cell;
  reaction_8: p43 => p18 + DISC; kD216trans_p55*p43*(DISCp55 + p30)*cell;  // modifiers: DISCp55, p30
  reaction_9: p43 => p18 + DISC; kD216trans_p43*p43*p43*cell;
  reaction_10: DISCp55 => p43; kD374*DISCp55*cell;
  reaction_11: DISCp55 => p43; kD374trans_p55*DISCp55*(DISCp55 + p30)*cell;  // modifiers: p30
  reaction_12: DISCp55 => p43; kD374trans_p43*DISCp55*p43*cell;
  reaction_13: p30 => p18 + DISC; kD374*p30*cell;
  reaction_14: p30 => p18 + DISC; kD374trans_p55*p30*(DISCp55 + p30)*cell;  // modifiers: DISCp55
  reaction_15: p30 => p18 + DISC; kD374trans_p43*p30*p43*cell;  // modifiers: p43
  reaction_16: p18 => p18inactive; kdiss_p18*p18*cell;
  reaction_17: Bid => tBid; kBid*Bid*(p43 + p18)*cell;  // modifiers: p43, p18
  reaction_18: PrNES_mCherry => PrNES + mCherry; kD374probe*PrNES_mCherry*(p43 + p18)*cell;  // modifiers: p43, p18
  reaction_19: PrER_mGFP => PrER + mGFP; kD374probe*PrER_mGFP*p18*cell;  // modifiers: p18
end
